*Heading
** Job name: Job-1 Model name: Model-1
** Generated by: Abaqus/CAE Student Edition 2016
*Preprint, echo=NO, model=NO, history=NO, contact=NO
**
** PARTS
**
*Part, name=Part-1
*Node
      1,          60.,           5.,           0.
      2,   58.5964928,           5.,           0.
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*Element, type=S4R
  1,   1,   2,  60,  59
  2,   2,   3,  61,  60
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*Nset, nset=Set-1, generate
   1,  870,    1
*Elset, elset=Set-1, generate
   1,  798,    1
** Section: Section-1
*Shell Section, elset=Set-1, material=Material-1
1., 5
*End Part
**
**
** ASSEMBLY
**
*Assembly, name=Assembly
**
*Instance, name=Part-1-1, part=Part-1
*End Instance
**
*Nset, nset=Set-1, instance=Part-1-1, generate
   1,  870,    1
*Elset, elset=Set-1, instance=Part-1-1, generate
   1,  798,    1
*Nset, nset=Set-2, instance=Part-1-1
   1,   2,   3,   4,   5,   6
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*Elset, elset=Set-2, instance=Part-1-1
   1,   2,   3,   4,   5,   6
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*Nset, nset=Set-3, instance=Part-1-1
   1,   2,   3,   4,   5,   6
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*Elset, elset=Set-3, instance=Part-1-1
   1,   2,   3,   4,   5,   6
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*Elset, elset=_Surf-1_SPOS, internal, instance=Part-1-1, generate
   1,  798,    1
*Surface, type=ELEMENT, name=Surf-1
_Surf-1_SPOS, SPOS
*End Assembly
**
** MATERIALS
**
*Material, name=Material-1
*Conductivity
 5.656,
*Elastic
 2.7e+06, 0.3
** ----------------------------------------------------------------
**
** STEP: Step-1
**
*Step, name=Step-1, nlgeom=NO
*Static
1., 1., 1e-05, 1.
**
** BOUNDARY CONDITIONS
**
** Name: BC-1 Type: Displacement/Rotation
*Boundary
Set-3, 1, 1
Set-3, 2, 2
Set-3, 3, 3
**
** LOADS
**
** Name: Load-1   Type: Pressure
*Dsload
Surf-1, P, 1.
**
** OUTPUT REQUESTS
**
*Restart, write, frequency=0
**
** FIELD OUTPUT: F-Output-1
**
*Output, field
*Node Output
CF, RF, U
*Element Output, directions=YES
ELEDEN, ELEN, ENER, LE, PE, PEEQ, PEMAG, S
*Contact Output
CDISP, CSTRESS
**
** HISTORY OUTPUT: H-Output-1
**
*Output, history, variable=PRESELECT
*End Step
