*Heading
 C:\Users\Denk\Desktop\Rechteck_40x20x10_grob.inp
*NODE
1, 0, 0, 0
2, 0, 0, 10
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******* E L E M E N T S *************
*ELEMENT, type=C3D8, ELSET=e_all
443633, 1208, 1211, 3481, 1213, 1214, 3482, 3485, 3483
443634, 1211, 920, 1212, 3481, 3482, 1216, 3484, 3485
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*MATERIAL, name=skeletonMat
*Conductivity
245.,
*Elastic
70000., 0.33
*SOLID SECTION,elset=e_all,material=skeletonMat
*Step, name=Step-1, nlgeom=NO
*Heat Transfer, steady state, deltmx=0.
1., 1., 1e-05, 1.,
*Boundary
382,11,11,0.0
388,11,11,0.0
469,11,11,0.0
469,11,11,0.0
389,11,11,0.0
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801,11,11,0.0
*Dflux
e_all, BF, -1.0
*End Step
