*Heading
** Job name: Job-1 Model name: Model-1
** Generated by: Abaqus/CAE Student Edition 2016
*Preprint, echo=NO, model=NO, history=NO, contact=NO
** ----------------------------------------------------------------
**
** PART INSTANCE: Part-1-1
**
*Node
      1,         -30.,          -5.,          15.
      2,         -30.,          -3.,          15.
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*Element, type=DC3D8
  1,  55,  56,  62,  61,   1,   2,   8,   7
  2,  56,  57,  63,  62,   2,   3,   9,   8
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*Nset, nset=Part-1-1_Set-1, generate
   1,  594,    1
*Elset, elset=Part-1-1_Set-1, generate
   1,  400,    1
** Section: Section-1
*Solid Section, elset=Part-1-1_Set-1, material=Material-1
,
*System
*Nset, nset=Set-1, generate
   1,  594,    1
*Elset, elset=Set-1, generate
   1,  400,    1
*Nset, nset=Set-2
   1,   2,   3,   4,   5,   6
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*Elset, elset=Set-2
   1,   2,   3,   4,   5,   6
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**
** MATERIALS
**
*Material, name=Material-1
*Conductivity
250.,
** ----------------------------------------------------------------
**
** STEP: Step-1
**
*Step, name=Step-1, nlgeom=NO
*Heat Transfer, steady state, deltmx=0.
1., 1., 1e-05, 1.,
**
** BOUNDARY CONDITIONS
**
** Name: BC-1 Type: Temperature
*Boundary
Set-2, 11, 11, 1.
**
** LOADS
**
** Name: Load-1   Type: Body heat flux
*Dflux
Set-1, BF, 100.
**
** OUTPUT REQUESTS
**
*Restart, write, frequency=0
**
** FIELD OUTPUT: F-Output-1
**
*Output, field, variable=PRESELECT
*Output, history, frequency=0
*End Step
