*Heading
** Job name: Job-1 Model name: Model-1
** Generated by: Abaqus/CAE Student Edition 2016
*Preprint, echo=NO, model=NO, history=NO, contact=NO
** ----------------------------------------------------------------
**
** PART INSTANCE: Part-1-1
**
*Node
      1,         -40.,           0.,  0.699999988
      2,         -40.,  0.714285731,  0.699999988
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*Element, type=C3D8R
  1,  17,  18,  26,  25,   1,   2,  10,   9
  2,  18,  19,  27,  26,   2,   3,  11,  10
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*Nset, nset=Part-1-1_Set-2, generate
   1,  480,    1
*Elset, elset=Part-1-1_Set-2, generate
   1,  203,    1
** Section: Section-1
*Solid Section, elset=Part-1-1_Set-2, material=Material-1
,
*System
*Nset, nset=Set-1
   1,   2,   3,   4,   5,   6
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*Elset, elset=Set-1
   1,   2,   3,   4,   5,   6
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*Nset, nset=Set-2, generate
   1,  480,    1
*Elset, elset=Set-2, generate
   1,  203,    1
*Nset, nset=Set-3, generate
   1,  480,    1
*Elset, elset=Set-3, generate
   1,  203,    1
*Nset, nset=Set-4, generate
   1,  480,    1
*Elset, elset=Set-4, generate
   1,  203,    1
*Nset, nset=Set-5
   1,   2,   3,   4,   5,   6
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*Elset, elset=Set-5
   1,   2,   3,   4,   5,   6
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*Nset, nset=Set-6, generate
   1,  480,    1
*Elset, elset=Set-6, generate
   1,  203,    1
**
** MATERIALS
**
*Material, name=Material-1
*Density
10.,
*Elastic
270000., 0.3
** ----------------------------------------------------------------
**
** STEP: Step-1
**
*Step, name=Step-1, nlgeom=NO
*Static
1., 1., 1e-05, 1.
**
** BOUNDARY CONDITIONS
**
** Name: BC-1 Type: Displacement/Rotation
*Boundary
Set-5, 1, 1
Set-5, 2, 2
Set-5, 3, 3
**
** LOADS
**
** Name: Load-1   Type: Body force
*Dload
Set-6, BY, 1.
**
** OUTPUT REQUESTS
**
*Restart, write, frequency=0
**
** FIELD OUTPUT: F-Output-1
**
*Output, field
*Node Output
CF, RF, U
*Element Output, directions=YES
ELEDEN, ELEN, ENER, LE, PE, PEEQ, PEMAG, S
*Contact Output
CDISP, CSTRESS
**
** HISTORY OUTPUT: H-Output-1
**
*Output, history, variable=PRESELECT
*End Step
