*Node
      1,         -25.,           0.,         200.
      2,         -25.,           5.,         200.
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*Element, type=C3D8R
 1,  29,  30,  32,  31,   1,   2,   4,   3
 2,  31,  32,  34,  33,   3,   4,   6,   5
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*Nset, nset=Part-1-1_Set-2, generate
   1,  140,    1
*Elset, elset=Part-1-1_Set-2, generate
  1,  52,   1
** Section: Section-1
*Solid Section, elset=Part-1-1_Set-2, material=Material-1
,
*System
*Nset, nset=Set-1
   1,   2,  29,  30,  57,  58,  85,  86, 113, 114
*Elset, elset=Set-1, generate
  1,  40,  13
*Nset, nset=Set-2
 140,
**
** MATERIALS
**
*Material, name=Material-1
*Elastic
70000., 0.33
** ----------------------------------------------------------------
**
** STEP: Step-1
**
*Step, name=Step-1, nlgeom=NO
*Static
1., 1., 1e-05, 1.
**
** BOUNDARY CONDITIONS
**
** Name: BC-1 Type: Displacement/Rotation
*Boundary
Set-1, 1, 1
Set-1, 2, 2
Set-1, 3, 3
**
** LOADS
**
** Name: Load-1   Type: Concentrated force
*Cload
Set-2, 1, 100.

*End Step
