*Node, NSET=Nall
1, 3.00057, -16.2419, -1
2, -1, -16.2419, -1
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*Element, TYPE=C3D4, ELSET=Eall
1942, 83, 82, 177, 322,
1943, 504, 345, 502, 344,
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

***********************************************************
** Element sets for materials and FEM element type (solid, shell, beam)
** written by write_element_sets_material_and_femelement_type function
*ELSET,ELSET=MechanicalMaterialSolid
Eall

***********************************************************
** Node set for fixed constraint
** written by write_node_sets_constraints_fixed function
*NSET,NSET=FemConstraintFixed
2,
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
***********************************************************
** Node sets for prescribed displacement constraint
** written by write_node_sets_constraints_displacement function

***********************************************************
** Node sets for loads
** written by write_node_sets_constraints_force function

***********************************************************
** Materials
** written by write_materials function
** Young's modulus unit is MPa = N/mm2
**FreeCAD material name: CalculiX-Steel
*MATERIAL, NAME=MechanicalMaterial
*Conductivity
245.,
*Elastic
70000., 0.33
***********************************************************
** Sections
** written by write_femelementsets function
*SOLID SECTION, ELSET=MechanicalMaterialSolid, MATERIAL=MechanicalMaterial
*STEP
*Heat Transfer, steady state, deltmx=0.
1., 1., 1e-05, 1.,
***********************************************************
** Constaints
** written by write_constraints_fixed function
*BOUNDARY
FemConstraintFixed,11,11,0
FemConstraintFixed,11,11,0
FemConstraintFixed,11,11,0
***********************************************************
** Displacement constraint applied
** written by write_constraints_displacement function
***********************************************************
** Node loads
** written by write_constraints_force function
*Dflux
Eall, BF, -1.0
*END STEP
