*Node, NSET=Nall
1, 3.00057, -16.2419, -1
2, -1, -16.2419, -1
3, -1, -20.232, -1
4, 3.00057, -16.2419, 0.983094
5, 3.00057, -20.232, 0.983094
6, 0.999999, -20.232, 3.02931
7, -1, -20.232, 1
8, -1, -16.2419, 1
9, 1, -16.2419, 3.02931
10, 3.00057, -20.232, -1
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*Element, TYPE=C3D4, ELSET=Eall
1942, 83, 82, 177, 322,
1943, 504, 345, 502, 344,
1944, 611, 411, 607, 610,
1945, 418, 129, 128, 295,
1946, 510, 528, 707, 699,
1947, 525, 700, 509, 522,
1948, 204, 216, 500, 357,
1949, 320, 668, 176, 665,
1950, 29, 36, 764, 11,
1951, 205, 204, 500, 357,
1952, 277, 127, 621, 398,
1953, 363, 228, 227, 516,
1954, 131, 293, 292, 130,
1955, 295, 129, 276, 294,
1956, 46, 641, 57, 310,
1957, 278, 398, 621, 126,
1958, 122, 281, 20, 291,
1959, 287, 286, 126, 621,
1960, 129, 140, 295, 418,
1961, 536, 238, 230, 369,
1962, 587, 598, 746, 596,
1963, 596, 731, 577, 732,
1964, 575, 289, 742, 586,
1965, 219, 553, 354, 567,
1966, 548, 727, 728, 719,
1967, 548, 727, 719, 547,
1968, 371, 565, 748, 556,
1969, 458, 329, 667, 172,
1970, 733, 744, 742, 597,
1971, 262, 115, 416, 282,
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

***********************************************************
** Element sets for materials and FEM element type (solid, shell, beam)
** written by write_element_sets_material_and_femelement_type function
*ELSET,ELSET=MechanicalMaterialSolid
Eall

***********************************************************
** Node set for fixed constraint
** written by write_node_sets_constraints_fixed function
*NSET,NSET=FemConstraintFixed
2,
11,
12,
21,
22,
23,
24,
25,
26,
27,
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
***********************************************************
** Node sets for prescribed displacement constraint
** written by write_node_sets_constraints_displacement function

***********************************************************
** Node sets for loads
** written by write_node_sets_constraints_force function

***********************************************************
** Materials
** written by write_materials function
** Young's modulus unit is MPa = N/mm2
**FreeCAD material name: CalculiX-Steel
*MATERIAL, NAME=MechanicalMaterial
*ELASTIC
210000 ,  0.300
*DENSITY
7.900e-09,

***********************************************************
** Sections
** written by write_femelementsets function
*SOLID SECTION, ELSET=MechanicalMaterialSolid, MATERIAL=MechanicalMaterial

***********************************************************
** One step is needed to calculate the mechanical analysis of FreeCAD
** loads are applied quasi-static, means without involving the time dimension
** written by write_step_begin function
*STEP
*STATIC

***********************************************************
** Constaints
** written by write_constraints_fixed function
*BOUNDARY
FemConstraintFixed,1
FemConstraintFixed,2
FemConstraintFixed,3


***********************************************************
** Displacement constraint applied
** written by write_constraints_displacement function


***********************************************************
** Node loads
** written by write_constraints_force function
*CLOAD

***********************************************************
** Element + CalculiX face + load in [MPa]
** written by write_constraints_pressure function
*DLOAD
** Load on face Face26
1978,P3,1000.0
1999,P2,1000.0
2021,P3,1000.0
2030,P4,1000.0
2056,P3,1000.0
2081,P3,1000.0
2094,P2,1000.0
2174,P1,1000.0
2203,P1,1000.0
2251,P1,1000.0
2274,P4,1000.0
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** Load on face Face25
2000,P3,1000.0
2246,P3,1000.0
2299,P1,1000.0
2323,P4,1000.0
2360,P3,1000.0
2377,P4,1000.0
2384,P3,1000.0
2505,P4,1000.0
2517,P4,1000.0
2531,P2,1000.0
2674,P3,1000.0
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
***********************************************************
** Outputs --> frd file
** written by write_outputs_types function
*NODE FILE
U
*EL FILE
S, E
** outputs --> dat file
*NODE PRINT , NSET=Nall
U
*EL PRINT , ELSET=Eall
S

***********************************************************
** written by write_step_end function
*END STEP

***********************************************************
** CalculiX Input file
** written by write_footer function
**   written by    --> FreeCAD 0.16.6712 (Git)
**   written on    --> Sat Jun 23 19:08:26 2018
**   file name     --> House_10x10x10.FCStd
**   analysis name --> MechanicalAnalysis001
**
**
**
**   Units
**
**   Geometry (mesh data)        --> mm
**   Materials (Young's modulus) --> N/mm2 = MPa
**   Loads (nodal loads)         --> N
**
