** written by FreeCAD inp file writer for CalculiX,Abaqus meshes
** highest dimension mesh elements only.

** Nodes
*Node, NSET=Nall
1, 3.000565052032, -22.59794998169, -1
2, -1, -22.59794807434, -1
3, 3.000565052032, -26.5880355835, -1
4, 3.000566005707, -22.59794998169, 0.9830939769745
5, 3.000565052032, -26.58803749084, 0.9830939769745
6, 0.999998986721, -26.5880355835, 3.029310941696
7, -1, -26.5880355835, 1
8, -1, -22.59794807434, 1
9, 1, -22.59794998169, 3.029310941696
10, -1, -26.5880355835, -1
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

** Volume elements
*Element, TYPE=C3D4, ELSET=Evolumes
1209, 298, 309, 69, 62
1210, 285, 623, 372, 560
1211, 68, 317, 77, 69
1212, 392, 526, 532, 533
1213, 44, 303, 134, 456
1214, 222, 503, 491, 521
1215, 298, 68, 69, 317
1216, 371, 482, 485, 354
1217, 490, 523, 499, 497
1218, 298, 68, 317, 297
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
** Define element set Eall
*ELSET, ELSET=Eall
Evolumes


***********************************************************
** Element sets for materials and FEM element type (solid, shell, beam, fluid)
** written by write_element_sets_material_and_femelement_type function
*ELSET,ELSET=SolidMaterialSolid
Evolumes

***********************************************************
** Node sets for fixed constraint
** written by write_node_sets_constraints_fixed function
** FemConstraintFixed
*NSET,NSET=FemConstraintFixed
1,
2,
3,
10,
11,
12,
13,
14,
33,
34,
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
***********************************************************
** Materials
** written by write_materials function
** Young's modulus unit is MPa = N/mm2
** FreeCAD material name: CalculiX-Steel
** SolidMaterial
*MATERIAL, NAME=SolidMaterial
*ELASTIC
210000, 0.300

***********************************************************
** Sections
** written by write_femelementsets function
*SOLID SECTION, ELSET=SolidMaterialSolid, MATERIAL=SolidMaterial

***********************************************************
** At least one step is needed to run an CalculiX analysis of FreeCAD
** written by write_step_begin function
*STEP
*STATIC


***********************************************************
** Fixed Constraints
** written by write_constraints_fixed function
** FemConstraintFixed
*BOUNDARY
FemConstraintFixed,1
FemConstraintFixed,2
FemConstraintFixed,3


***********************************************************
** Element + CalculiX face + load in [MPa]
** written by write_constraints_pressure function
** FemConstraintPressure
*DLOAD
** FemConstraintPressure: face load
1235,P3,1000.0
1255,P4,1000.0
1261,P2,1000.0
1267,P2,1000.0
1272,P2,1000.0
1278,P1,1000.0
1300,P3,1000.0
1313,P2,1000.0
1346,P2,1000.0
1438,P4,1000.0
1483,P2,1000.0
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
***********************************************************
** Outputs --> frd file
** written by write_outputs_types function
*NODE FILE
U
*EL FILE
S, E
** outputs --> dat file
*NODE PRINT , NSET=Nall
U
*EL PRINT , ELSET=Eall
S

***********************************************************
** written by write_step_end function
*END STEP

***********************************************************
** CalculiX Input file
** written by write_footer function
**   written by    --> FreeCAD 0.17.13522 (Git)
**   written on    --> Sat Jun 23 20:58:29 2018
**   file name     --> House_10x10x10_mod.FCStd
**   analysis name --> Analysis
**
**
**
**   Units
**
**   Geometry (mesh data)        --> mm
**   Materials (Young's modulus) --> N/mm2 = MPa
**   Loads (nodal loads)         --> N
**
