** written by FreeCAD inp file writer for CalculiX,Abaqus meshes
** highest dimension mesh elements only.

** Nodes
*Node, NSET=Nall
1, 3.000565052032, -22.59794998169, -1
2, -1, -22.59794807434, -1
3, 3.000565052032, -26.5880355835, -1
4, 3.000566005707, -22.59794998169, 0.9830939769745
5, 3.000565052032, -26.58803749084, 0.9830939769745
6, 0.999998986721, -26.5880355835, 3.029310941696
7, -1, -26.5880355835, 1
8, -1, -22.59794807434, 1
9, 1, -22.59794998169, 3.029310941696
10, -1, -26.5880355835, -1
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

** Volume elements
*Element, TYPE=C3D4, ELSET=Evolumes
6025, 3064, 3065, 1252, 1257
6026, 1188, 3071, 3073, 3614
6027, 729, 2873, 4250, 16
6028, 1210, 3614, 3082, 1227
6029, 4873, 3665, 3664, 1833
6030, 4388, 3083, 3080, 4768
6031, 1188, 3071, 3614, 1227
6032, 3071, 1255, 1227, 1241
6033, 187, 3073, 188, 2372
6034, 371, 3548, 1350, 1378
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
** Define element set Eall
*ELSET, ELSET=Eall
Evolumes


***********************************************************
** Element sets for materials and FEM element type (solid, shell, beam, fluid)
** written by write_element_sets_material_and_femelement_type function
*ELSET,ELSET=SolidMaterialSolid
Evolumes

***********************************************************
** Node sets for fixed constraint
** written by write_node_sets_constraints_fixed function
** FemConstraintFixed
*NSET,NSET=FemConstraintFixed
1,
2,
3,
10,
11,
12,
13,
14,
635,
632,
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
***********************************************************
** Materials
** written by write_materials function
** Young's modulus unit is MPa = N/mm2
** FreeCAD material name: CalculiX-Steel

***********************************************************
** Materials
** written by write_materials function
** Young's modulus unit is MPa = N/mm2
** FreeCAD material name: CalculiX-Steel
** SolidMaterial
*MATERIAL, NAME=SolidMaterial
*ELASTIC
210000, 0.300
*Conductivity
245.,

***********************************************************
** Sections
** written by write_femelementsets function
*SOLID SECTION, ELSET=SolidMaterialSolid, MATERIAL=SolidMaterial

***********************************************************
** At least one step is needed to run an CalculiX analysis of FreeCAD
** written by write_step_begin function
*STEP
*STATIC
*Heat Transfer, steady state, deltmx=0.
1., 1., 1e-05, 1.,

***********************************************************
** Fixed Constraints
** written by write_constraints_fixed function
** FemConstraintFixed
*BOUNDARY
FemConstraintFixed,11,11,0
FemConstraintFixed,11,11,0
FemConstraintFixed,11,11,0

*Dflux
Evolumes, BF, -1.0
*END STEP
