** written by FreeCAD inp file writer for CalculiX,Abaqus meshes
** highest dimension mesh elements only.

** Nodes
*Node, NSET=Nall
1, 3.000565052032, -22.59794998169, -1
2, -1, -22.59794807434, -1
3, 3.000565052032, -26.5880355835, -1
4, 3.000566005707, -22.59794998169, 0.9830939769745
5, 3.000565052032, -26.58803749084, 0.9830939769745
6, 0.999998986721, -26.5880355835, 3.029310941696
7, -1, -26.5880355835, 1
8, -1, -22.59794807434, 1
9, 1, -22.59794998169, 3.029310941696
10, -1, -26.5880355835, -1
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

** Volume elements
*Element, TYPE=C3D4, ELSET=Evolumes
6025, 3064, 3065, 1252, 1257
6026, 1188, 3071, 3073, 3614
6027, 729, 2873, 4250, 16
6028, 1210, 3614, 3082, 1227
6029, 4873, 3665, 3664, 1833
6030, 4388, 3083, 3080, 4768
6031, 1188, 3071, 3614, 1227
6032, 3071, 1255, 1227, 1241
6033, 187, 3073, 188, 2372
6034, 371, 3548, 1350, 1378
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
** Define element set Eall
*ELSET, ELSET=Eall
Evolumes


***********************************************************
** Element sets for materials and FEM element type (solid, shell, beam, fluid)
** written by write_element_sets_material_and_femelement_type function
*ELSET,ELSET=SolidMaterialSolid
Evolumes

***********************************************************
** Node sets for fixed constraint
** written by write_node_sets_constraints_fixed function
** FemConstraintFixed
*NSET,NSET=FemConstraintFixed
1,
2,
3,
10,
11,
12,
13,
14,
635,
632,
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
***********************************************************
** Materials
** written by write_materials function
** Young's modulus unit is MPa = N/mm2
** FreeCAD material name: CalculiX-Steel
** SolidMaterial
*MATERIAL, NAME=SolidMaterial
*ELASTIC
210000, 0.300

***********************************************************
** Sections
** written by write_femelementsets function
*SOLID SECTION, ELSET=SolidMaterialSolid, MATERIAL=SolidMaterial

***********************************************************
** At least one step is needed to run an CalculiX analysis of FreeCAD
** written by write_step_begin function
*STEP
*STATIC


***********************************************************
** Fixed Constraints
** written by write_constraints_fixed function
** FemConstraintFixed
*BOUNDARY
FemConstraintFixed,1
FemConstraintFixed,2
FemConstraintFixed,3


***********************************************************
** Element + CalculiX face + load in [MPa]
** written by write_constraints_pressure function
** FemConstraintPressure
*DLOAD
** FemConstraintPressure: face load
6032,P3,1000.0
6037,P1,1000.0
6053,P1,1000.0
6054,P3,1000.0
6059,P4,1000.0
6065,P4,1000.0
6082,P4,1000.0
6083,P1,1000.0
6101,P3,1000.0
6137,P1,1000.0
6153,P3,1000.0
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
***********************************************************
** Outputs --> frd file
** written by write_outputs_types function
*NODE FILE
U
*EL FILE
S, E
** outputs --> dat file
*NODE PRINT , NSET=Nall
U
*EL PRINT , ELSET=Eall
S

***********************************************************
** written by write_step_end function
*END STEP

***********************************************************
** CalculiX Input file
** written by write_footer function
**   written by    --> FreeCAD 0.17.13522 (Git)
**   written on    --> Sat Jun 23 20:57:01 2018
**   file name     --> House_10x10x10_mod.FCStd
**   analysis name --> Analysis
**
**
**
**   Units
**
**   Geometry (mesh data)        --> mm
**   Materials (Young's modulus) --> N/mm2 = MPa
**   Loads (nodal loads)         --> N
**
