** written by FreeCAD inp file writer for CalculiX,Abaqus meshes
** highest dimension mesh elements only.

** Nodes
*Node, NSET=Nall
1, 0.9018840193748, -15.83340835571, -0.00188600004185
2, 1.002446055412, -15.83340835571, -0.0008399999933317
3, 0.9018840193748, -13.83340835571, -0.00188600004185
4, 1.002446055412, -13.83340835571, -0.0008399999933317
5, -0.0001559999946039, -13.83340930939, 1.000597953796
6, -0.0001570000022184, -15.83340930939, 1.000597000122
7, -1.007295012474, -15.83340835571, 0.001730000018142
8, -1.0072940588, -13.83340835571, 0.001730000018142
9, -0.9072189927101, -13.83340835571, 0.004313000012189
10, -0.9072189927101, -15.83340835571, 0.004313000012189
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

** Volume elements
*Element, TYPE=C3D4, ELSET=Evolumes
4108, 1714, 826, 805, 1773
4109, 595, 639, 638, 1556
4110, 1350, 1406, 1405, 1129
4111, 291, 173, 679, 174
4112, 317, 1142, 853, 318
4113, 1794, 834, 1784, 828
4114, 861, 1178, 308, 862
4115, 861, 1178, 862, 915
4116, 1147, 306, 338, 307
4117, 864, 226, 1315, 52
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
** Define element set Eall
*ELSET, ELSET=Eall
Evolumes


***********************************************************
** Element sets for materials and FEM element type (solid, shell, beam, fluid)
** written by write_element_sets_material_and_femelement_type function
*ELSET,ELSET=SolidMaterialSolid
Evolumes

***********************************************************
** Node sets for fixed constraint
** written by write_node_sets_constraints_fixed function
** FemConstraintFixed
*NSET,NSET=FemConstraintFixed
1,
2,
3,
4,
5,
6,
7,
8,
9,
10,
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
***********************************************************
** Materials
** written by write_materials function
** Young's modulus unit is MPa = N/mm2
** FreeCAD material name: CalculiX-Steel
** SolidMaterial
*MATERIAL, NAME=SolidMaterial
*ELASTIC
210000, 0.300

***********************************************************
** Sections
** written by write_femelementsets function
*SOLID SECTION, ELSET=SolidMaterialSolid, MATERIAL=SolidMaterial

***********************************************************
** At least one step is needed to run an CalculiX analysis of FreeCAD
** written by write_step_begin function
*STEP
*STATIC


***********************************************************
** Fixed Constraints
** written by write_constraints_fixed function
** FemConstraintFixed
*BOUNDARY
FemConstraintFixed,1
FemConstraintFixed,2
FemConstraintFixed,3


***********************************************************
** Element + CalculiX face + load in [MPa]
** written by write_constraints_pressure function
** FemConstraintPressure
*DLOAD
** FemConstraintPressure: face load
4109,P1,1000.0
4110,P1,1000.0
4111,P3,1000.0
4119,P2,1000.0
4120,P2,1000.0
4121,P2,1000.0
4124,P4,1000.0
4129,P3,1000.0
4132,P3,1000.0
4133,P1,1000.0
4144,P3,1000.0
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
***********************************************************
** Outputs --> frd file
** written by write_outputs_types function
*NODE FILE
U
*EL FILE
S, E
** outputs --> dat file
*NODE PRINT , NSET=Nall
U
*EL PRINT , ELSET=Eall
S

***********************************************************
** written by write_step_end function
*END STEP

***********************************************************
** CalculiX Input file
** written by write_footer function
**   written by    --> FreeCAD 0.17.13522 (Git)
**   written on    --> Sat Jun 23 21:44:11 2018
**   file name     -->
**   analysis name --> Analysis
**
**
**
**   Units
**
**   Geometry (mesh data)        --> mm
**   Materials (Young's modulus) --> N/mm2 = MPa
**   Loads (nodal loads)         --> N
**
