** written by FreeCAD inp file writer for CalculiX,Abaqus meshes
** highest dimension mesh elements only.

** Nodes
*Node, NSET=Nall
1, 10, 0.1, 0
2, 10, 0.1, 10
3, 10, 0, 0
4, 10, 0, 10
5, 0, 0.1, 0
6, 0, 0.1, 10
7, 0, 0, 0
8, 0, 0, 10
9, 0.1, 0.1, 10
10, 0.22, 0.1, 10
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

** Volume elements
*Element, TYPE=C3D4, ELSET=Evolumes
25651, 1647, 1636, 7208, 7505
25652, 7981, 8015, 1831, 7672
25653, 7945, 8202, 8215, 2224
25654, 3806, 9263, 3995, 3747
25655, 7520, 1650, 2015, 7519
25656, 2043, 7895, 7894, 8167
25657, 7083, 785, 1153, 786
25658, 11715, 5940, 11813, 11812
25659, 5940, 11715, 11714, 11812
25660, 2197, 8261, 8003, 2474
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
** Define element set Eall
*ELSET, ELSET=Eall
Evolumes


***********************************************************
** Element sets for materials and FEM element type (solid, shell, beam, fluid)
** written by write_element_sets_material_and_femelement_type function
*ELSET,ELSET=SolidMaterialSolid
Evolumes

***********************************************************
** Node sets for fixed constraint
** written by write_node_sets_constraints_fixed function
** FemConstraintFixed
*NSET,NSET=FemConstraintFixed
1,
2,
3,
4,
573,
574,
575,
576,
577,
578,
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
***********************************************************
** Materials
** written by write_materials function
** Young's modulus unit is MPa = N/mm2
** FreeCAD material name: CalculiX-Steel
** SolidMaterial
*MATERIAL, NAME=SolidMaterial
*ELASTIC
210000, 0.300

***********************************************************
** Sections
** written by write_femelementsets function
*SOLID SECTION, ELSET=SolidMaterialSolid, MATERIAL=SolidMaterial

***********************************************************
** At least one step is needed to run an CalculiX analysis of FreeCAD
** written by write_step_begin function
*STEP
*STATIC


***********************************************************
** Fixed Constraints
** written by write_constraints_fixed function
** FemConstraintFixed
*BOUNDARY
FemConstraintFixed,1
FemConstraintFixed,2
FemConstraintFixed,3


***********************************************************
** Node loads Constraints
** written by write_constraints_force function
*CLOAD
** FemConstraintForce
** node loads on shape: Box:Edge2
6,3,5.0000000000000E-01
8,3,5.0000000000000E-01


***********************************************************
** Outputs --> frd file
** written by write_outputs_types function
*NODE FILE
U
*EL FILE
S, E
** outputs --> dat file
*NODE PRINT , NSET=Nall
U
*EL PRINT , ELSET=Eall
S

***********************************************************
** written by write_step_end function
*END STEP

***********************************************************
** CalculiX Input file
** written by write_footer function
**   written by    --> FreeCAD 0.17.13522 (Git)
**   written on    --> Tue Jun 26 11:15:16 2018
**   file name     -->
**   analysis name --> Analysis
**
**
**
**   Units
**
**   Geometry (mesh data)        --> mm
**   Materials (Young's modulus) --> N/mm2 = MPa
**   Loads (nodal loads)         --> N
**
