** written by FreeCAD inp file writer for CalculiX,Abaqus meshes
** highest dimension mesh elements only.

** Nodes
*Node, NSET=Nall
1, -13, 7, 2
2, -13, 7, 0
3, -13, -7, 2
4, -12, 7, 2
5, -13, -7, 0
6, -12, 7, 0
7, 20, -10, 2
8, 20, -10, 0
9, -20, -10, 2
10, -20, -10, 0
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

** Volume elements
*Element, TYPE=C3D10, ELSET=Evolumes
2138, 1044, 5, 696, 1067, 3878, 2937, 3880, 3881, 3879, 3882
2139, 172, 343, 614, 227, 1791, 3883, 3885, 3762, 3884, 2703
2140, 588, 576, 593, 887, 2629, 2635, 2637, 3887, 3886, 3888
2141, 576, 883, 593, 887, 3889, 3890, 2635, 3886, 3630, 3888
2142, 620, 238, 184, 239, 2717, 3697, 3891, 2716, 1312, 3698
2143, 294, 1, 46, 79, 3892, 1406, 1548, 1551, 3893, 1530
2144, 727, 526, 763, 792, 3894, 3895, 3195, 3278, 3896, 3267
2145, 279, 1025, 987, 984, 3897, 3898, 3900, 3901, 3899, 3902
2146, 244, 894, 910, 975, 3672, 3903, 3790, 3905, 3904, 3906
2147, 183, 675, 351, 350, 3907, 3908, 1814, 1812, 3909, 1816
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
** Define element set Eall
*ELSET, ELSET=Eall
Evolumes


***********************************************************
** Element sets for materials and FEM element type (solid, shell, beam, fluid)
** written by write_element_sets_material_and_femelement_type function
*ELSET,ELSET=SolidMaterialSolid
2138,
2139,
2140,
2141,
2142,
2144,
2145,
2146,
2147,
2149,
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*ELSET,ELSET=SolidMaterial001Solid
2143,
2148,
2151,
2158,
2247,
2251,
2260,
2266,
2271,
2274,
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
***********************************************************
** Node sets for fixed constraint
** written by write_node_sets_constraints_fixed function
** FemConstraintFixed
*NSET,NSET=FemConstraintFixed
1,
2,
3,
5,
15,
16,
17,
18,
19,
20,
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
***********************************************************
** Materials
** written by write_materials function
** Young's modulus unit is MPa = N/mm2
** FreeCAD material name: CalculiX-Steel
** DesignSpace
*MATERIAL, NAME=SolidMaterial
*ELASTIC
210000, 0.300
** FreeCAD material name: CalculiX-Steel
** NoDesignSpace
*MATERIAL, NAME=SolidMaterial001
*ELASTIC
210000, 0.300

***********************************************************
** Sections
** written by write_femelementsets function
*SOLID SECTION, ELSET=SolidMaterialSolid, MATERIAL=SolidMaterial
*SOLID SECTION, ELSET=SolidMaterial001Solid, MATERIAL=SolidMaterial001

***********************************************************
** At least one step is needed to run an CalculiX analysis of FreeCAD
** written by write_step_begin function
*STEP
*STATIC


***********************************************************
** Fixed Constraints
** written by write_constraints_fixed function
** FemConstraintFixed
*BOUNDARY
FemConstraintFixed,1
FemConstraintFixed,2
FemConstraintFixed,3


***********************************************************
** Node loads Constraints
** written by write_constraints_force function
*CLOAD
** FemConstraintForce
** node loads on shape: BooleanFragments:Edge8
7,2,-5.3833333333333E-02
8,2,-5.9833333333333E-02
80,2,-1.1283333333333E-01
81,2,-1.0683333333333E-01
1144,2,-2.3933333333333E-01
1145,2,-2.1200000000000E-01
1146,2,-2.1533333333333E-01


***********************************************************
** Outputs --> frd file
** written by write_outputs_types function
*NODE FILE
U
*EL FILE
S, E
** outputs --> dat file
*NODE PRINT , NSET=Nall
U
*EL PRINT , ELSET=Eall
S

***********************************************************
** written by write_step_end function
*END STEP

***********************************************************
** CalculiX Input file
** written by write_footer function
**   written by    --> FreeCAD 0.17.13541 (Git)
**   written on    --> Thu Nov 22 12:22:08 2018
**   file name     --> FixedPlate.FCStd
**   analysis name --> Analysis
**
**
**
**   Units
**
**   Geometry (mesh data)        --> mm
**   Materials (Young's modulus) --> N/mm2 = MPa
**   Loads (nodal loads)         --> N
**
