** written by FreeCAD inp file writer for CalculiX,Abaqus meshes
** highest dimension mesh elements only.

** Nodes
*Node, NSET=Nall
1, 5.10552406311, 0.999998986721, 1
2, -1, 1, 1
3, -1, -1, 1
4, 5.105523109436, -1.000000953674, 1
5, 5.007047868544, 0.9999990030642, 1
6, 4.908571673978, 0.9999990194075, 1
7, 4.810095479411, 0.9999990357507, 1
8, 4.711619284845, 0.9999990520939, 1
9, 4.613143090279, 0.9999990684371, 1
10, 4.514666895713, 0.9999990847803, 1
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

** Face elements
*Element, TYPE=S6, ELSET=Efaces
230, 1097, 541, 743, 1210, 1211, 1212
231, 689, 1097, 743, 1213, 1212, 1214
232, 581, 748, 909, 1215, 1216, 1217
233, 1019, 749, 579, 1218, 1219, 1220
234, 685, 749, 1019, 1221, 1218, 1222
235, 748, 1046, 909, 1223, 1224, 1216
236, 651, 968, 729, 1225, 1226, 1227
237, 968, 517, 729, 1228, 1229, 1226
238, 929, 540, 755, 1230, 1231, 1232
239, 791, 540, 929, 1233, 1230, 1234
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
** Define element set Eall
*ELSET, ELSET=Eall
Efaces


***********************************************************
** Element sets for materials and FEM element type (solid, shell, beam, fluid)
** written by write_element_sets_material_and_femelement_type function
*ELSET,ELSET=SolidMaterialElementGeometry2D
Efaces

***********************************************************
** Node sets for fixed constraint
** written by write_node_sets_constraints_fixed function
** FemConstraintFixed
*NSET,NSET=FemConstraintFixed
128,
129,
2,
3,
132,
133,
134,
135,
136,
137,
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
***********************************************************
** Materials
** written by write_materials function
** Young's modulus unit is MPa = N/mm2
** FreeCAD material name: CalculiX-Steel
** SolidMaterial
*MATERIAL, NAME=SolidMaterial
*ELASTIC
210000, 0.300

***********************************************************
** Sections
** written by write_femelementsets function
*SHELL SECTION, ELSET=SolidMaterialElementGeometry2D, MATERIAL=SolidMaterial
1

***********************************************************
** At least one step is needed to run an CalculiX analysis of FreeCAD
** written by write_step_begin function
*STEP
*STATIC


***********************************************************
** Fixed Constraints
** written by write_constraints_fixed function
** FemConstraintFixed
*BOUNDARY
FemConstraintFixed,1
FemConstraintFixed,2
FemConstraintFixed,3
FemConstraintFixed,4
FemConstraintFixed,5
FemConstraintFixed,6


***********************************************************
** Node loads Constraints
** written by write_constraints_force function
*CLOAD
** FemConstraintForce
** node loads on shape: untitled001:Face2
1,3,0.0000000000000E+00
3,3,0.0000000000000E+00
4,3,0.0000000000000E+00
167,3,0.0000000000000E+00
168,3,0.0000000000000E+00
169,3,0.0000000000000E+00
170,3,0.0000000000000E+00
171,3,0.0000000000000E+00
172,3,0.0000000000000E+00
173,3,0.0000000000000E+00
174,3,0.0000000000000E+00
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
** node loads on shape: untitled001:Face1
1,3,0.0000000000000E+00
2,3,0.0000000000000E+00
3,3,0.0000000000000E+00
5,3,0.0000000000000E+00
6,3,0.0000000000000E+00
7,3,0.0000000000000E+00
8,3,0.0000000000000E+00
9,3,0.0000000000000E+00
10,3,0.0000000000000E+00
11,3,0.0000000000000E+00
12,3,0.0000000000000E+00
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

***********************************************************
** Outputs --> frd file
** written by write_outputs_types function
*NODE FILE, OUTPUT=2d
U
*EL FILE
S, E
** outputs --> dat file
*NODE PRINT , NSET=Nall
U
*EL PRINT , ELSET=Eall
S

***********************************************************
** written by write_step_end function
*END STEP

***********************************************************
** CalculiX Input file
** written by write_footer function
**   written by    --> FreeCAD 0.17.13522 (Git)
**   written on    --> Mon Jul 30 14:32:30 2018
**   file name     -->
**   analysis name --> Analysis
**
**
**
**   Units
**
**   Geometry (mesh data)        --> mm
**   Materials (Young's modulus) --> N/mm2 = MPa
**   Loads (nodal loads)         --> N
**
