*Heading
 C:\Users\Denk\Desktop\StructuredMesh
*NODE
1, -1, -1, 0
2, 0, -1, 0
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*ELEMENT, type=S4, ELSET=Surface1
260620, 1584, 4047, 14902, 4049
260621, 4047, 1725, 4048, 14902
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
*NSET,NSET=BoundarySET
390, 386, 388, 410, 448, 458
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
*ELSET,ELSET=Load
2,


* SolidMaterial
*MATERIAL, NAME=SolidMaterial
*ELASTIC
210000, 0.300

***********************************************************
** Sections
** written by write_femelementsets function
*SHELL SECTION, ELSET=SolidMaterialElementGeometry2D, MATERIAL=SolidMaterial
1

***********************************************************
** At least one step is needed to run an CalculiX analysis of FreeCAD
** written by write_step_begin function
*STEP
*STATIC
*BOUNDARY
BoundarySET, 1
BoundarySET, 2
BoundarySET, 3
*CLOAD
131, 2, 100

***********************************************************
** Outputs --> frd file
** written by write_outputs_types function
*NODE FILE, OUTPUT=2d
U
*EL FILE
S, E
** outputs --> dat file
*NODE PRINT , NSET=Nall
U
*EL PRINT , ELSET=Eall
S


*END STEP
