** written by FreeCAD inp file writer for CalculiX,Abaqus meshes
** highest dimension mesh elements only.

** Nodes
*Node, NSET=Nall
1, -10.42732612768, 0, 0
2, -10.42732612768, -20, 1.33226762955e-014
3, -9.927326127676, 0, 0
4, -9.927326127676, -20, 1.33226762955e-014
5, 0, 5.995204332976e-015, 9
6, 0, -20, 9
7, 9.927326127676, 0, 0
8, 9.927326127676, -20, 1.33226762955e-014
9, 10.42732612768, 0, 0
10, 10.42732612768, -20, 1.33226762955e-014
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

** Volume elements
*Element, TYPE=C3D10, ELSET=Evolumes
12887, 969, 50, 19362, 49, 1088, 19910, 24839, 1087, 89, 19911
12888, 580, 579, 12294, 13502, 619, 12492, 12491, 14051, 14050, 24840
12889, 949, 29, 30, 18805, 1027, 69, 1028, 24841, 19849, 19848
12890, 12274, 559, 12944, 560, 12452, 13988, 24842, 12451, 599, 13989
12891, 14, 19487, 15, 934, 19798, 19801, 54, 982, 24843, 983
12892, 12259, 13629, 545, 544, 24844, 13941, 12421, 12422, 13939, 584
12893, 969, 19362, 18853, 49, 24839, 19914, 24845, 1087, 19911, 19913
12894, 579, 12995, 12294, 13502, 14053, 24846, 12492, 14050, 14054, 24840
12895, 934, 19487, 15, 18829, 24843, 19801, 983, 24847, 19806, 19805
12896, 12969, 13629, 545, 12259, 13946, 13941, 13944, 24848, 24844, 12421
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
** Define element set Eall
*ELSET, ELSET=Eall
Evolumes


***********************************************************
** Element sets for materials and FEM element type (solid, shell, beam, fluid)
** written by write_element_sets_material_and_femelement_type function
*ELSET,ELSET=SolidMaterialSolid
Evolumes

***********************************************************
** Node sets for fixed constraint
** written by write_node_sets_constraints_fixed function
** FemConstraintFixed
*NSET,NSET=FemConstraintFixed
24576,
24577,
2,
24579,
4,
24581,
6,
24583,
8,
24585,
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
***********************************************************
** Materials
** written by write_materials function
** Young's modulus unit is MPa = N/mm2
** Density's unit is t/mm^3
** FreeCAD material name: CalculiX-Steel
** SolidMaterial
*MATERIAL, NAME=SolidMaterial
*ELASTIC
210000, 0.300
*DENSITY
7.900e-09

***********************************************************
** Sections
** written by write_femelementsets function
*SOLID SECTION, ELSET=SolidMaterialSolid, MATERIAL=SolidMaterial

***********************************************************
** At least one step is needed to run an CalculiX analysis of FreeCAD
** written by write_step_begin function
*STEP
*STATIC


***********************************************************
** Fixed Constraints
** written by write_constraints_fixed function
** FemConstraintFixed
*BOUNDARY
FemConstraintFixed,1
FemConstraintFixed,2
FemConstraintFixed,3


***********************************************************
** Self weight Constraint
** written by write_constraints_selfweight function
** ConstraintSelfWeight
*DLOAD
Eall,GRAV,9810,0.0,0.0,-1.0


***********************************************************
** Outputs --> frd file
** written by write_outputs_types function
*NODE FILE
U
*EL FILE
S, E
** outputs --> dat file
*NODE PRINT , NSET=Nall
U
*EL PRINT , ELSET=Eall
S

***********************************************************
** written by write_step_end function
*END STEP

***********************************************************
** CalculiX Input file
** written by write_footer function
**   written by    --> FreeCAD 0.17.13541 (Git)
**   written on    --> Tue Jan 22 13:54:20 2019
**   file name     -->
**   analysis name --> Analysis
**
**
**
**   Units
**
**   Geometry (mesh data)        --> mm
**   Materials (Young's modulus) --> N/mm2 = MPa
**   Loads (nodal loads)         --> N
**
