** written by FreeCAD inp file writer for CalculiX,Abaqus meshes
** highest dimension mesh elements only.

** Nodes
*Node, NSET=Nall
1, -30, 10, 0
2, -30, 10, 0.05
3, 30, 10, 0.05
4, 30, 10, 0
5, 30, 0, 0.05
6, 30, 0, 0
7, -30, 0, 0.05
8, -30, 0, 0
9, -30, 10, 0
10, 30, 10, 0
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

** Volume elements
*Element, TYPE=C3D8, ELSET=Evolumes
26889, 25229, 25232, 25228, 25224, 11361, 11365, 11364, 10992
26890, 3743, 3744, 3740, 3371, 25229, 25232, 25228, 25224
26891, 25232, 25230, 25225, 25228, 11365, 11363, 11004, 11364
26892, 3744, 3741, 3383, 3740, 25232, 25230, 25225, 25228
26893, 25227, 25231, 25232, 25229, 11274, 11362, 11365, 11361
26894, 3653, 3742, 3744, 3743, 25227, 25231, 25232, 25229
26895, 25231, 25226, 25230, 25232, 11362, 10382, 11363, 11365
26896, 3742, 2761, 3741, 3744, 25231, 25226, 25230, 25232
26897, 25238, 25241, 25237, 25233, 11366, 11370, 11369, 10772
26898, 3748, 3749, 3745, 3151, 25238, 25241, 25237, 25233
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
** Define element set Eall
*ELSET, ELSET=Eall
Evolumes


***********************************************************
** Element sets for materials and FEM element type (solid, shell, beam, fluid)
** written by write_element_sets_material_and_femelement_type function
*ELSET,ELSET=SolidMaterialSolid
Evolumes

***********************************************************
** Node sets for fixed constraint
** written by write_node_sets_constraints_fixed function
** FemConstraintFixed
*NSET,NSET=FemConstraintFixed
1,
2,
17579,
7,
8,
9,
12,
13,
1859,
1883,
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
***********************************************************
** Materials
** written by write_materials function
** Young's modulus unit is MPa = N/mm2
** FreeCAD material name: CalculiX-Steel
** SolidMaterial
*MATERIAL, NAME=SolidMaterial
*ELASTIC
210000, 0.300

***********************************************************
** Sections
** written by write_femelementsets function
*SOLID SECTION, ELSET=SolidMaterialSolid, MATERIAL=SolidMaterial

***********************************************************
** At least one step is needed to run an CalculiX analysis of FreeCAD
** written by write_step_begin function
*STEP
*STATIC


***********************************************************
** Fixed Constraints
** written by write_constraints_fixed function
** FemConstraintFixed
*BOUNDARY
FemConstraintFixed,1
FemConstraintFixed,2
FemConstraintFixed,3


***********************************************************
** Element + CalculiX face + load in [MPa]
** written by write_constraints_pressure function
** FemConstraintPressure
*DLOAD
** FemConstraintPressure: face load
26889,P2,1000.0
26891,P2,1000.0
26893,P2,1000.0
26895,P2,1000.0
26897,P2,1000.0
26899,P2,1000.0
26901,P2,1000.0
26903,P2,1000.0
26905,P2,1000.0
26907,P2,1000.0
26909,P2,1000.0
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
***********************************************************
** Outputs --> frd file
** written by write_outputs_types function
*NODE FILE
U
*EL FILE
S, E
** outputs --> dat file
*NODE PRINT , NSET=Nall
U
*EL PRINT , ELSET=Eall
S

***********************************************************
** written by write_step_end function
*END STEP

***********************************************************
** CalculiX Input file
** written by write_footer function
**   written by    --> FreeCAD 0.17.13522 (Git)
**   written on    --> Tue Aug 07 11:30:48 2018
**   file name     --> RectangleExtruded.FCStd
**   analysis name --> Analysis001
**
**
**
**   Units
**
**   Geometry (mesh data)        --> mm
**   Materials (Young's modulus) --> N/mm2 = MPa
**   Loads (nodal loads)         --> N
**
