** written by FreeCAD inp file writer for CalculiX,Abaqus meshes
** highest dimension mesh elements only.

** Nodes
*Node, NSET=Nall
1, -30, 10, 0
2, -30, 10, 0.05
3, 30, 10, 0.05
4, 30, 10, 0
5, 30, 0, 0.05
6, 30, 0, 0
7, -30, 0, 0.05
8, -30, 0, 0
9, -30, 10, 0
10, 30, 10, 0
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

** Volume elements
*Element, TYPE=C3D8, ELSET=Evolumes
365, 269, 297, 89, 87, 155, 179, 22, 21
366, 89, 297, 270, 23, 22, 179, 156, 3
367, 270, 297, 269, 268, 156, 179, 155, 151
368, 107, 130, 32, 31, 269, 297, 89, 87
369, 32, 130, 106, 4, 89, 297, 270, 23
370, 106, 130, 107, 102, 270, 297, 269, 268
371, 272, 298, 99, 97, 157, 180, 44, 43
372, 99, 298, 273, 45, 44, 180, 158, 7
373, 273, 298, 272, 271, 158, 180, 157, 150
374, 109, 131, 54, 53, 272, 298, 99, 97
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
** Define element set Eall
*ELSET, ELSET=Eall
Evolumes


***********************************************************
** Element sets for materials and FEM element type (solid, shell, beam, fluid)
** written by write_element_sets_material_and_femelement_type function
*ELSET,ELSET=SolidMaterialSolid
Evolumes

***********************************************************
** Node sets for fixed constraint
** written by write_node_sets_constraints_fixed function
** FemConstraintFixed
*NSET,NSET=FemConstraintFixed
1,
2,
100,
70,
7,
8,
9,
12,
13,
45,
80,
55,
56,
57,
218,

***********************************************************
** Materials
** written by write_materials function
** Young's modulus unit is MPa = N/mm2
** FreeCAD material name: CalculiX-Steel
** SolidMaterial
*MATERIAL, NAME=SolidMaterial
*ELASTIC
210000, 0.300

***********************************************************
** Sections
** written by write_femelementsets function
*SOLID SECTION, ELSET=SolidMaterialSolid, MATERIAL=SolidMaterial

***********************************************************
** At least one step is needed to run an CalculiX analysis of FreeCAD
** written by write_step_begin function
*STEP
*STATIC


***********************************************************
** Fixed Constraints
** written by write_constraints_fixed function
** FemConstraintFixed
*BOUNDARY
FemConstraintFixed,1
FemConstraintFixed,2
FemConstraintFixed,3


***********************************************************
** Element + CalculiX face + load in [MPa]
** written by write_constraints_pressure function
** FemConstraintPressure
*DLOAD
** FemConstraintPressure: face load
515,P2,1000.0
516,P2,1000.0
517,P2,1000.0
521,P2,1000.0
522,P2,1000.0
523,P2,1000.0
527,P2,1000.0
528,P2,1000.0
529,P2,1000.0
533,P2,1000.0
534,P2,1000.0
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
***********************************************************
** Outputs --> frd file
** written by write_outputs_types function
*NODE FILE
U
*EL FILE
S, E
** outputs --> dat file
*NODE PRINT , NSET=Nall
U
*EL PRINT , ELSET=Eall
S

***********************************************************
** written by write_step_end function
*END STEP

***********************************************************
** CalculiX Input file
** written by write_footer function
**   written by    --> FreeCAD 0.17.13522 (Git)
**   written on    --> Tue Aug 07 11:54:08 2018
**   file name     --> RectangleExtruded.FCStd
**   analysis name --> Analysis
**
**
**
**   Units
**
**   Geometry (mesh data)        --> mm
**   Materials (Young's modulus) --> N/mm2 = MPa
**   Loads (nodal loads)         --> N
**
