** written by FreeCAD inp file writer for CalculiX,Abaqus meshes
** highest dimension mesh elements only.

** Nodes
*Node, NSET=Nall
1, -20, 0, 0
2, 20, 0, 0
3, 20, 10, 0
4, -20, 10, 0
5, 20, 10, 0.05
6, -20, 10, 0.05
7, -20, 0, 0.05
8, 20, 0, 0.05
9, -19, 0, 0
10, -18, 0, 0
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

** Volume elements
*Element, TYPE=C3D8, ELSET=Evolumes
1209, 1005, 1006, 1004, 1003, 281, 283, 282, 205
1210, 728, 730, 729, 652, 1005, 1006, 1004, 1003
1211, 1006, 594, 592, 1004, 283, 95, 94, 282
1212, 730, 145, 144, 729, 1006, 594, 592, 1004
1213, 595, 596, 1006, 1005, 97, 96, 283, 281
1214, 148, 147, 730, 728, 595, 596, 1006, 1005
1215, 596, 106, 594, 1006, 96, 4, 95, 283
1216, 147, 6, 145, 730, 596, 106, 594, 1006
1217, 1009, 1010, 1008, 1007, 284, 286, 285, 206
1218, 731, 733, 732, 653, 1009, 1010, 1008, 1007
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
** Define element set Eall
*ELSET, ELSET=Eall
Evolumes


***********************************************************
** Element sets for materials and FEM element type (solid, shell, beam, fluid)
** written by write_element_sets_material_and_femelement_type function
*ELSET,ELSET=SolidMaterialSolid
Evolumes

***********************************************************
** Node sets for fixed constraint
** written by write_node_sets_constraints_fixed function
** FemConstraintFixed
*NSET,NSET=FemConstraintFixed
1,
4,
6,
7,
146,
147,
148,
149,
150,
151,
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
***********************************************************
** Materials
** written by write_materials function
** Young's modulus unit is MPa = N/mm2
** FreeCAD material name: CalculiX-Steel
** SolidMaterial
*MATERIAL, NAME=SolidMaterial
*Conductivity
245.,
*Elastic
70000., 0.33

***********************************************************
** Sections
** written by write_femelementsets function
*SOLID SECTION, ELSET=SolidMaterialSolid, MATERIAL=SolidMaterial

***********************************************************
** Fixed Constraints
** written by write_constraints_fixed function
** FemConstraintFixed
*BOUNDARY
FemConstraintFixed,11, 11, 100.
FemConstraintFixed,11, 11, 100.
FemConstraintFixed,11, 11, 100.
*Step, name=Step-1, nlgeom=NO
*Heat Transfer, steady state, deltmx=0.
1., 1., 1e-05, 1.,
*Boundary
Set-2, 11, 11, 100.
*Dflux
Eall, BF, -200.
*END STEP
