** written by FreeCAD inp file writer for CalculiX,Abaqus meshes
** highest dimension mesh elements only.

** Nodes
*Node, NSET=Nall
1, -13, 7, 1
2, -13, 7, 0
3, -13, -7, 1
4, -12, 7, 1
5, -13, -7, 0
6, -12, 7, 0
7, 20, -10, 1
8, 20, -10, 0
9, -20, -10, 1
10, -20, -10, 0
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

** Volume elements
*Element, TYPE=C3D4, ELSET=Evolumes
4436, 538, 1444, 539, 592
4437, 1603, 885, 1510, 1683
4438, 1179, 1135, 1136, 1960
4439, 808, 958, 1683, 885
4440, 939, 863, 940, 1746
4441, 445, 574, 1268, 446
4442, 1877, 1035, 1139, 1056
4443, 571, 1396, 442, 1342
4444, 193, 1313, 380, 270
4445, 1106, 1156, 1953, 1931
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
** Define element set Eall
*ELSET, ELSET=Eall
Evolumes


***********************************************************
** Element sets for materials and FEM element type (solid, shell, beam, fluid)
** written by write_element_sets_material_and_femelement_type function
*ELSET,ELSET=SolidMaterialSolid
4436,
4437,
4438,
4439,
4440,
4441,
4442,
4443,
4444,
4445,
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*ELSET,ELSET=SolidMaterial001Solid
5868,
5942,
6024,
7021,
7064,
7249,
10312,
10313,
10314,
10315,
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
***********************************************************
** Node sets for fixed constraint
** written by write_node_sets_constraints_fixed function
** FemConstraintFixed
*NSET,NSET=FemConstraintFixed
68,
1,
2,
3,
5,
66,
15,
16,
17,
18,
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
***********************************************************
** Materials
** written by write_materials function
** Young's modulus unit is MPa = N/mm2
** FreeCAD material name: CalculiX-Steel
** SolidMaterial
*MATERIAL, NAME=SolidMaterial
*ELASTIC
210000, 0.300
** FreeCAD material name: CalculiX-Steel
** SolidMaterial001
*MATERIAL, NAME=SolidMaterial001
*ELASTIC
210000, 0.300

***********************************************************
** Sections
** written by write_femelementsets function
*SOLID SECTION, ELSET=SolidMaterialSolid, MATERIAL=SolidMaterial
*SOLID SECTION, ELSET=SolidMaterial001Solid, MATERIAL=SolidMaterial001

***********************************************************
** At least one step is needed to run an CalculiX analysis of FreeCAD
** written by write_step_begin function
*STEP
*STATIC


***********************************************************
** Fixed Constraints
** written by write_constraints_fixed function
** FemConstraintFixed
*BOUNDARY
FemConstraintFixed,1
FemConstraintFixed,2
FemConstraintFixed,3


***********************************************************
** Node loads Constraints
** written by write_constraints_force function
*CLOAD
** FemConstraintForce
** node loads on shape: BooleanFragments:Edge8
7,2,-5.0000000000000E-01
8,2,-5.0000000000000E-01


***********************************************************
** Outputs --> frd file
** written by write_outputs_types function
*NODE FILE
U
*EL FILE
S, E
** outputs --> dat file
*NODE PRINT , NSET=Nall
U
*EL PRINT , ELSET=Eall
S

***********************************************************
** written by write_step_end function
*END STEP

***********************************************************
** CalculiX Input file
** written by write_footer function
**   written by    --> FreeCAD 0.17.13541 (Git)
**   written on    --> Thu Nov 22 12:47:57 2018
**   file name     --> FixedPlate.FCStd
**   analysis name --> Analysis
**
**
**
**   Units
**
**   Geometry (mesh data)        --> mm
**   Materials (Young's modulus) --> N/mm2 = MPa
**   Loads (nodal loads)         --> N
**
