*Node
      1,         -25.,           0.,         200.
      2,         -25.,           5.,         200.
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*Element, type=C3D10
  1, 102, 141, 140,  99, 157, 156, 155, 159, 158, 160
  2,  21, 141,   3,  20, 163, 162, 161, 165, 164, 166
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*Nset, nset=Part-1-1_Set-2, generate
   1,  849,    1
*Elset, elset=Part-1-1_Set-2, generate
   1,  404,    1
** Section: Section-1
*Solid Section, elset=Part-1-1_Set-2, material=Material-1
,
*System
*Nset, nset=Set-1
   1,   2,   5,   8,  33,  34
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*Elset, elset=Set-1
  92, 206, 210, 258, 263, 274, 328, 379
*Nset, nset=Set-2
 6,
**
** MATERIALS
**
*Material, name=Material-1
*Elastic
70000., 0.33
** ----------------------------------------------------------------
**
** STEP: Step-1
**
*Step, name=Step-1, nlgeom=NO
*Static
1., 1., 1e-05, 1.
**
** BOUNDARY CONDITIONS
**
** Name: BC-1 Type: Displacement/Rotation
*Boundary
Set-1, 1, 1
Set-1, 2, 2
Set-1, 3, 3
*Cload
Set-2, 1, 100.
*End Step
