*** Topology optimization input deck
*Node
      1,         -25.,           0.,         200.
      2,         -25.,           5.,         200.
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*Element, type=C3D20R
  1,  43,  44,  46,  45,   1,   2,   4,   3, 298, 297, 296, 295, 299, 300, 301,
     302, 304, 303, 305, 306
  2,  45,  46,  48,  47,   3,   4,   6,   5, 296, 309, 308, 307, 301, 310, 311,
     312, 306, 305, 313, 314
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*Nset, nset=Part-1-1_Set-2, generate
   1,  973,    1
*Elset, elset=Part-1-1_Set-2, generate
   1,  120,    1
** Section: Section-1
*Solid Section, elset=Part-1-1_Set-2, material=Material-1
,
*System
*Nset, nset=Set-1
   1,   2,  43,  44,  85,  86
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*Elset, elset=Set-1, generate
   1,  101,   20
*Nset, nset=Set-2
 294,

*Material, name=Material-1
*Elastic
70000., 0.33

*ELSET, ELSET=TOPO_ALL_ELEMENTS_DMST
1,2,3,4,5,6
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*BOUNDARY
1, 1, 1, 0.0
1, 2, 2, 0.0
1, 3, 3, 0.0
2, 1, 1, 0.0
2, 2, 2, 0.0
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973, 3, 3, 0.172634
*Step, name=Step-1, nlgeom=NO
*Static
1., 1., 1e-05, 1.

** Name: BC-1 Type: Displacement/Rotation
*Cload
Set-2, 1, 100.

*EL PRINT, ELSET=TOPO_ALL_ELEMENTS_DMST
ENER
*End Step
