*** Topology optimization input deck
*Node
      1,         -25.,           0.,         200.
      2,         -25.,           5.,         200.
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*Element, type=C3D20R
  1,  43,  44,  46,  45,   1,   2,   4,   3, 298, 297, 296, 295, 299, 300, 301,
     302, 304, 303, 305, 306
  2,  45,  46,  48,  47,   3,   4,   6,   5, 296, 309, 308, 307, 301, 310, 311,
     312, 306, 305, 313, 314
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*Nset, nset=Part-1-1_Set-2, generate
   1,  973,    1
*Elset, elset=Part-1-1_Set-2, generate
   1,  120,    1
** Section: Section-1
,
*System
*Nset, nset=Set-1
   1,   2,  43,  44,  85,  86
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*Elset, elset=Set-1, generate
   1,  101,   20
*Nset, nset=Set-2
 294,

*Material, name=Material-1
*Elastic
70000., 0.33

*MATERIAL, name=topo_material1
*ELASTIC
70.00000000000001, 0.0003300000000000001, 0.0
*CONDUCTIVITY
*MATERIAL, name=topo_material2
*ELASTIC
560.0000000000001, 0.002640000000000001, 0.0
*CONDUCTIVITY
*MATERIAL, name=topo_material3
*ELASTIC
1889.9999999999998, 0.00891, 0.0
*CONDUCTIVITY
*MATERIAL, name=topo_material4
*ELASTIC
4480.000000000001, 0.021120000000000007, 0.0
*CONDUCTIVITY
*MATERIAL, name=topo_material5
*ELASTIC
8750.0, 0.04125, 0.0
*CONDUCTIVITY
*MATERIAL, name=topo_material6
*ELASTIC
15119.999999999998, 0.07128, 0.0
*CONDUCTIVITY
*MATERIAL, name=topo_material7
*ELASTIC
24009.999999999993, 0.11318999999999997, 0.0
*CONDUCTIVITY
*MATERIAL, name=topo_material8
*ELASTIC
35840.00000000001, 0.16896000000000005, 0.0
*CONDUCTIVITY
*MATERIAL, name=topo_material9
*ELASTIC
51030.00000000001, 0.24057000000000003, 0.0
*CONDUCTIVITY
*MATERIAL, name=topo_material10
*ELASTIC
70000.0, 0.33, 0.0
*CONDUCTIVITY
*ELSET,ELSET=topoElementSet1
19,20,40,41,42,43
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*ELSET,ELSET=topoElementSet2
18,29,30,31,32,33
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*ELSET,ELSET=topoElementSet3
15,16,17,21,22,23
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*ELSET,ELSET=topoElementSet4
12,14,35,36,55,56
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*ELSET,ELSET=topoElementSet5
5,9,10,11,13,99,100,
103,104,106,
*ELSET,ELSET=topoElementSet6
3,4,6,7,8,120,
*ELSET,ELSET=topoElementSet7
1,2,
*SOLID SECTION,ELSET=topoElementSet1,material=topo_material1
*SOLID SECTION,ELSET=topoElementSet2,material=topo_material2
*SOLID SECTION,ELSET=topoElementSet3,material=topo_material3
*SOLID SECTION,ELSET=topoElementSet4,material=topo_material4
*SOLID SECTION,ELSET=topoElementSet5,material=topo_material5
*SOLID SECTION,ELSET=topoElementSet6,material=topo_material6
*SOLID SECTION,ELSET=topoElementSet7,material=topo_material7
*Step, name=Step-1, nlgeom=NO
*Static
1., 1., 1e-05, 1.

** Name: BC-1 Type: Displacement/Rotation
*Boundary
Set-1, 1, 1
Set-1, 2, 2
Set-1, 3, 3

*Cload
Set-2, 1, 100.

*NODE FILE
U
*End Step
